Clear

! northern-islands-v1 -- GENERATED by module1.topology.spec; do not hand-edit.
! Four fully islanded 400 V microgrids (Nainativu, Delft-Neduntivu, Analaitivu,
! Eluvaitivu). No inter-island cable and no mainland source exist. Each island's lead
! diesel genset is its grid-forming source. Provenance of every value: the JSON pin
! packages/contracts/python/metacore_contracts/schema/module1_topology_v1.json

Set DefaultBaseFrequency=50

! Nainativu: lead genset NAI_DG1 (380 kVA)
New Circuit.NorthernIslands bus1=NAI_PS basekv=0.4 pu=1.0 phases=3 MVAsc3=50.0 MVAsc1=50.0
! Delft-Neduntivu: lead genset DEL_DG1 (330 kVA)
New Vsource.DEL_DG1_SRC bus1=DEL_PS basekv=0.4 pu=1.0 phases=3 MVAsc3=50.0 MVAsc1=50.0
! Analaitivu: lead genset ANA_DG1 (250 kVA)
New Vsource.ANA_DG1_SRC bus1=ANA_PS basekv=0.4 pu=1.0 phases=3 MVAsc3=50.0 MVAsc1=50.0
! Eluvaitivu: lead genset ELU_DG1 (100 kVA)
New Vsource.ELU_DG1_SRC bus1=ELU_PS basekv=0.4 pu=1.0 phases=3 MVAsc3=50.0 MVAsc1=50.0

New Line.NAI_PS_F1 Bus1=NAI_PS Bus2=NAI_F1 phases=3 R1=0.064 X1=0.016 R0=0.256 X0=0.064 Length=0.4 Units=km NormAmps=500.0
New Line.NAI_PS_F2 Bus1=NAI_PS Bus2=NAI_F2 phases=3 R1=0.064 X1=0.016 R0=0.256 X0=0.064 Length=0.4 Units=km NormAmps=500.0
New Line.DEL_PS_F1 Bus1=DEL_PS Bus2=DEL_F1 phases=3 R1=0.08 X1=0.02 R0=0.32 X0=0.08 Length=0.4 Units=km NormAmps=400.0
New Line.DEL_PS_F2 Bus1=DEL_PS Bus2=DEL_F2 phases=3 R1=0.08 X1=0.02 R0=0.32 X0=0.08 Length=0.4 Units=km NormAmps=400.0
New Line.ANA_PS_F1 Bus1=ANA_PS Bus2=ANA_F1 phases=3 R1=0.16 X1=0.04 R0=0.64 X0=0.16 Length=0.4 Units=km NormAmps=200.0
New Line.ANA_PS_F2 Bus1=ANA_PS Bus2=ANA_F2 phases=3 R1=0.16 X1=0.04 R0=0.64 X0=0.16 Length=0.4 Units=km NormAmps=200.0
New Line.ELU_PS_F1 Bus1=ELU_PS Bus2=ELU_F1 phases=3 R1=0.32 X1=0.08 R0=1.28 X0=0.32 Length=0.4 Units=km NormAmps=100.0
New Line.ELU_PS_F2 Bus1=ELU_PS Bus2=ELU_F2 phases=3 R1=0.32 X1=0.08 R0=1.28 X0=0.32 Length=0.4 Units=km NormAmps=100.0
New Line.ELU_HYB_F1 Bus1=ELU_HYB Bus2=ELU_F1 phases=3 R1=0.32 X1=0.08 R0=1.28 X0=0.32 Length=0.3 Units=km NormAmps=125.0

New Generator.NAI_DG2 Bus1=NAI_PS kV=0.4 kW=0 kvar=0 kVA=250.0 Model=1 phases=3
New Generator.NAI_DG3 Bus1=NAI_PS kV=0.4 kW=0 kvar=0 kVA=250.0 Model=1 phases=3
New Generator.DEL_DG2 Bus1=DEL_PS kV=0.4 kW=0 kvar=0 kVA=250.0 Model=1 phases=3
New Generator.DEL_DG3 Bus1=DEL_PS kV=0.4 kW=0 kvar=0 kVA=250.0 Model=1 phases=3
New Generator.ANA_DG2 Bus1=ANA_PS kV=0.4 kW=0 kvar=0 kVA=100.0 Model=1 phases=3
New Generator.ANA_DG3 Bus1=ANA_PS kV=0.4 kW=0 kvar=0 kVA=100.0 Model=1 phases=3
New Generator.ELU_HYB_PV Bus1=ELU_HYB kV=0.4 kW=0 kvar=0 kVA=46.26 Model=1 phases=3
New Generator.ELU_HYB_WIND Bus1=ELU_HYB kV=0.4 kW=0 kvar=0 kVA=21.0 Model=1 phases=3 enabled=no
New Generator.ELU_HYB_BESS Bus1=ELU_HYB kV=0.4 kW=0 kvar=0 kVA=72.0 Model=1 phases=3
New Generator.ELU_HYB_DG Bus1=ELU_HYB kV=0.4 kW=0 kvar=0 kVA=30.0 Model=1 phases=3

New Load.NAI_F1_LOAD Bus1=NAI_F1 kV=0.4 kW=67.805 kvar=42.022 Model=1 phases=3 Vminpu=0.85 Vmaxpu=1.15
New Load.NAI_F2_LOAD Bus1=NAI_F2 kV=0.4 kW=67.805 kvar=42.022 Model=1 phases=3 Vminpu=0.85 Vmaxpu=1.15
New Load.DEL_F1_LOAD Bus1=DEL_F1 kV=0.4 kW=62.44 kvar=38.697 Model=1 phases=3 Vminpu=0.85 Vmaxpu=1.15
New Load.DEL_F2_LOAD Bus1=DEL_F2 kV=0.4 kW=62.44 kvar=38.697 Model=1 phases=3 Vminpu=0.85 Vmaxpu=1.15
New Load.ANA_F1_LOAD Bus1=ANA_F1 kV=0.4 kW=23.5 kvar=14.564 Model=1 phases=3 Vminpu=0.85 Vmaxpu=1.15
New Load.ANA_F2_LOAD Bus1=ANA_F2 kV=0.4 kW=23.5 kvar=14.564 Model=1 phases=3 Vminpu=0.85 Vmaxpu=1.15
New Load.ELU_F1_LOAD Bus1=ELU_F1 kV=0.4 kW=10.88 kvar=6.743 Model=1 phases=3 Vminpu=0.85 Vmaxpu=1.15
New Load.ELU_F2_LOAD Bus1=ELU_F2 kV=0.4 kW=10.88 kvar=6.743 Model=1 phases=3 Vminpu=0.85 Vmaxpu=1.15

Set VoltageBases=[0.4]
CalcVoltageBases
Set ControlMode=Static
Set MaxIterations=100
Set Tolerance=0.0001
